folder simulations: version=34
  simulation Rotation Sample (Directed Graph)
    metfile met: filename=%apsim%/Examples/MetFiles/Goond.met
    clock
      start_date = 1/01/1940  # Enter the start date of the simulation
      end_date = 31/12/1950  # Enter the end date of the simulation
    summaryfile
    area Paddock
      Soil: LocalName=Brigalow; Site=Kupunn; Region=South East Queensland
        Comment = oc and ph not measured  # Comments
        SoilType = Grey Vertosol  # Soil description
        NearestTown = Dalby, Q 4405
        NaturalVegetation = Brigalow, belah, wilga
        InitialWater Initial water: FractionFull=1; PercentMethod=FilledFromTop
        Water
          Thickness  BD    AirDry  LL15  DUL   SAT
          150        1.4   0.105   0.21  0.39  0.44
          150        1.39  0.189   0.21  0.39  0.44
          300        1.37  0.22    0.22  0.4   0.45
          300        1.36  0.25    0.25  0.41  0.46
          300        1.38  0.27    0.27  0.4   0.45
          300        1.39  0.31    0.31  0.39  0.44
          300        1.42  0.36    0.36  0.38  0.43
          SoilCrop Chickpea: LL=[0.21, 0.21, 0.22, 0.27, 0.29, 0.34, 0.38]; KL=[0.1, 0.1, 0.08, 0.06, 0.04, 0.02, 0.01]; XF=[1, 1, 1, 1, 1, 1, 1]
          SoilCrop Cotton: LL=[0.21, 0.21, 0.22, 0.25, 0.27, 0.31, 0.36]; KL=[0.1, 0.1, 0.1, 0.1, 0.09, 0.07, 0.05]; XF=[1, 1, 1, 1, 1, 1, 1]
          SoilCrop Sorghum: LL=[0.21, 0.21, 0.26, 0.26, 0.28, 0.34, 0.36]; KL=[0.1, 0.1, 0.1, 0.08, 0.06, 0.04, 0.02]; XF=[1, 1, 1, 1, 1, 1, 1]
          SoilCrop Wheat: LL=[0.21, 0.21, 0.25, 0.28, 0.31, 0.37, 0.38]; KL=[0.1, 0.1, 0.08, 0.06, 0.04, 0.02, 0.01]; XF=[1, 1, 1, 1, 1, 1, 1]
        SoilWater: SummerCona=3.5; SummerU=6; SummerDate=1-Nov; WinterCona=3.5; WinterU=6; WinterDate=1-Apr; DiffusConst=40; DiffusSlope=16; Salb=0.13; CN2Bare=73; CNRed=20; CNCov=0.8; Thickness=[150, 150, 300, 300, 300, 300, 300]; SWCON=[0.3, 0.3, 0.3, 0.3, 0.3, 0.3, 0.3]
        SoilOrganicMatter: RootCN=40; RootWt=200; SoilCN=12.5; EnrACoeff=7.4; EnrBCoeff=0.2
          Thickness  OC    FBiom  FInert
          150        1.24  0.03   0.4
          150        1.24  0.02   0.6
          300        1.25  0.01   0.8
          300        1.1   0.01   0.9
          300        0.71  0.01   0.95
          300        0.34  0.01   0.95
          300        0.26  0.01   0.95
        Analysis: Thickness=[150, 150, 300, 300, 300, 300, 300]; PH=[7, 7, 7, 7, 7, 7, 7]
        Sample Initial nitrogen
          Thickness  NO3    NH4
          150        6.500  0.600
          150        2.100  0.100
          300        2.100  0.100
          300        1.700  0.100
          300        1.700  0.100
          300        1.700  0.100
          300        1.700  0.100
      fertiliser
      chickpea
      cotton
      wheat
      tclmanager Manager
        rule Rotation Initialisation
          on init:
```
source $apsuite/UserInterface/APSFarm/RotationInitialisation.tcl
set state "WinterFallow"
```
          on process:
```
checkSetup
doProcess
```
        rotplot Rotation Management: canvas_height=401; rules_height=227; graph_name=stateGraph
          node SummerFallow2: desc=New state
          node Chickpea: desc=Chickpea
          node Wheat: desc=Wheat Crop
          node WinterFallow: desc=New state
          node SummerFallow1: desc=New state
          node F1: desc=New state
          node Cotton: desc=A Cotton Crop
          arc arc2: source=SummerFallow1; target=WinterFallow; rules=[apsimGet day]  == 192
          arc arc6: source=WinterFallow; target=Cotton; actions=sow_cotton; rules=[canPlant_cotton]
          arc arc3: source=Wheat; target=SummerFallow2
            actions=[apsimSendMessage wheat harvest, apsimSendMessage wheat end_crop]
            rules={[apsimGet wheat.stageName] == "harvest_ripe" || [apsimGet wheat.PlantStatus] == "dead"}
          arc arc7: source=F1; target=SummerFallow1; rules=[apsimGet day]  == 192
          arc arc0: source=F1; target=Chickpea; actions=sow_chickpea; rules=[canPlant_chickpea]
          arc arc8: source=Chickpea; target=SummerFallow1
            actions=[apsimSendMessage chickpea harvest, apsimSendMessage chickpea end_crop]
            rules={[apsimGet chickpea.stageName] == "harvest_ripe" || [apsimGet chickpea.PlantStatus] == "dead"}
          arc arc1: source=SummerFallow1; target=Wheat; actions=sow_wheat; rules=[canPlant_wheat]
          arc arc5: source=Cotton; target=F1; actions=apsimSendMessage cotton harvest; rules=[apsimGet ozcot_status] > 0
          arc arc9: source=SummerFallow2; target=WinterFallow; rules=[apsimGet day]  == 74
          rule stateGraph Init rule
            on init:
```
package require struct
::struct::graph stateGraph
stateGraph node insert "SummerFallow2"
set colour(SummerFallow2) "-657956"
stateGraph node insert "Chickpea"
set colour(Chickpea) "-657956"
stateGraph node insert "Wheat"
set colour(Wheat) "-657956"
stateGraph node insert "WinterFallow"
set colour(WinterFallow) "-657956"
stateGraph node insert "SummerFallow1"
set colour(SummerFallow1) "-657956"
stateGraph node insert "F1"
set colour(F1) "-657956"
stateGraph node insert "Cotton"
set colour(Cotton) "-657956"
stateGraph arc insert "SummerFallow1" "WinterFallow" "arc2"
stateGraph arc lappend "arc2" actions {}
stateGraph arc lappend "arc2" rules {[apsimGet day]  == 192}
stateGraph arc insert "WinterFallow" "Cotton" "arc6"
stateGraph arc lappend "arc6" actions {sow_cotton}
stateGraph arc lappend "arc6" rules {[canPlant_cotton]}
stateGraph arc insert "Wheat" "SummerFallow2" "arc3"
stateGraph arc lappend "arc3" actions {apsimSendMessage wheat harvest}
stateGraph arc lappend "arc3" actions {apsimSendMessage wheat end_crop}
stateGraph arc lappend "arc3" rules {{[apsimGet wheat.stageName] == "harvest_ripe" || [apsimGet wheat.PlantStatus] == "dead"}}
stateGraph arc insert "F1" "SummerFallow1" "arc7"
stateGraph arc lappend "arc7" actions {}
stateGraph arc lappend "arc7" rules {[apsimGet day]  == 192}
stateGraph arc insert "F1" "Chickpea" "arc0"
stateGraph arc lappend "arc0" actions {sow_chickpea}
stateGraph arc lappend "arc0" rules {[canPlant_chickpea]}
stateGraph arc insert "Chickpea" "SummerFallow1" "arc8"
stateGraph arc lappend "arc8" actions {apsimSendMessage chickpea harvest}
stateGraph arc lappend "arc8" actions {apsimSendMessage chickpea end_crop}
stateGraph arc lappend "arc8" rules {{[apsimGet chickpea.stageName] == "harvest_ripe" || [apsimGet chickpea.PlantStatus] == "dead"}}
stateGraph arc insert "SummerFallow1" "Wheat" "arc1"
stateGraph arc lappend "arc1" actions {sow_wheat}
stateGraph arc lappend "arc1" rules {[canPlant_wheat]}
stateGraph arc insert "Cotton" "F1" "arc5"
stateGraph arc lappend "arc5" actions {apsimSendMessage cotton harvest}
stateGraph arc lappend "arc5" rules {[apsimGet ozcot_status] > 0}
stateGraph arc insert "SummerFallow2" "WinterFallow" "arc9"
stateGraph arc lappend "arc9" actions {}
stateGraph arc lappend "arc9" rules {[apsimGet day]  == 74}
```
        rule Cotton Sowing Rule
          state = Cotton
          crop = cotton
          date1 = 15-oct
          date2 = 15-dec
          raincrit = 10
          rainnumdays = 3
          esw_amount = 100
          must_sow = yes
          cultivar = Siok
          plants = 100
          sowing_depth = 30
          row_spacing = 1000
          fert_cost = ???
          criteria = variable
          plants_pm = 10
          skiprow = 0
          module = ozcot
          skipplant = 0
          class = plant
          on init:
```
# Support procedures
# Can we plant a crop today?
proc canPlant_cotton {} {
  if {"variable" == "variable"} {
     set year [apsimGet year]; set day [apsimGet day]
     set d1 [clock format [clock scan "15-oct-$year"] -format %j]
     set d2 [clock format [clock scan "15-dec-$year"] -format %j]

     if {"yes" == "yes" && $day == $d2} {return 1}

     if {$d1 > $d2} {
        set dateOK [expr $day >= $d1 || $day <= $d2]
     } else {
        set dateOK [expr $day >= $d1 && $day <= $d2]
     }
     set rainOK [expr [apsimGet rain\[3\]] >= 10]
     set eswOK [expr [apsimGet esw] >= 100]
     return [expr $dateOK && $rainOK && $eswOK]
  } elseif {"variable" == "fixed"} {
     set year [apsimGet year]; set day [apsimGet day]
     set d1 [clock format [clock scan "15-oct-$year"] -format %j]
     return [expr $day == $d1]
  } else {
     error "Unknown sowing criteria \"variable\"."
  }
  return "notreached"
}

# Plant a crop now
proc sow_cotton {} {
  if {"ozcot" == "plant"} {
     apsimSendMessage cotton sow {Population 100} {sowing_depth 30} \
             {cultivar Siok} {row_spacing 1000} \
             {skipplant 0} {skiprow 0} {crop_class plant}
  } elseif {"ozcot" == "cropmod"} {
     apsimSendMessage cotton sow {Population [density]} {sowing_depth [depth]} \
             {cultivar Siok} {row_spacing 1000} {skiprow 0}
  } elseif {"ozcot" == "growth"} {
     apsimSendMessage cotton ???
  } elseif {"ozcot" == "ozcot"} {
     apsimSendMessage cotton sow {plants_pm 10} {sowing_depth 30} \
             {row_spacing 1000} {skiprow 0} {cultivar Siok}
  } elseif {"ozcot" == "oryza"} {
     apsimSendMessage cotton sow {cultivar Siok}
  } elseif {"ozcot" == "sorghum"} {
     apsimSendMessage cotton sow {Population 100} {sowing_depth 30} \
             {cultivar Siok} {row_spacing 1000} {skiprow 0} \
             {tiller_no_fertile [tiller_no_fertile]}
  } elseif {"ozcot" == "sugar"} {
     apsimSendMessage cotton sow {Population 100} {cultivar Siok} {sowing_depth 30}
  } else {
    error "Unknown crop module \"ozcot\"."
  }
}
```
        rule Chickpea Sowing Rule
          state = Chickpea
          crop = chickpea
          date1 = 15-may
          date2 = 10-jul
          raincrit = 15
          rainnumdays = 3
          esw_amount = 50
          must_sow = no
          cultivar = amethyst
          plants = 25
          sowing_depth = 30
          row_spacing = 500
          fert_cost = ???
          criteria = variable
          skipplant = 0
          skiprow = 0
          class = plant
          module = plant
          on init:
```
# Support procedures
# Can we plant a crop today?
proc canPlant_[crop] {} {
  if {"[criteria]" == "variable"} {
     set year [apsimGet year]; set day [apsimGet day]
     set d1 [clock format [clock scan "[date1]-$year"] -format %j]
     set d2 [clock format [clock scan "[date2]-$year"] -format %j]

     if {"[must_sow]" == "yes" && $day == $d2} {return 1}

     if {$d1 > $d2} {
        set dateOK [expr $day >= $d1 || $day <= $d2]
     } else {
        set dateOK [expr $day >= $d1 && $day <= $d2]
     }
     set rainOK [expr [apsimGet rain\[[rainnumdays]\]] >= [raincrit]]
     set eswOK [expr [apsimGet esw] >= [esw_amount]]
     return [expr $dateOK && $rainOK && $eswOK]
  } elseif {"[criteria]" == "fixed"} {
     set year [apsimGet year]; set day [apsimGet day]
     set d1 [clock format [clock scan "[date1]-$year"] -format %j]
     return [expr $day == $d1]
  } else {
     error "Unknown sowing criteria \"[criteria]\"."
  }
  return "notreached"
}

# Plant a crop now
proc sow_[crop] {} {
  if {"[module]" == "plant"} {
     apsimSendMessage [crop] sow {Population [plants]} {sowing_depth [sowing_depth]} \
             {cultivar [cultivar]} {row_spacing [row_spacing]} \
             {skipplant [skipplant]} {skiprow [skiprow]} {crop_class [class]}
  } elseif {"[module]" == "cropmod"} {
     apsimSendMessage [crop] sow {Population [density]} {sowing_depth [depth]} \
             {cultivar [cultivar]} {row_spacing [row_spacing]} {skiprow [skiprow]}
  } elseif {"[module]" == "growth"} {
     apsimSendMessage [crop] ???
  } elseif {"[module]" == "ozcot"} {
     apsimSendMessage [crop] sow {plants_pm [plants_pm]} {sowing_depth [sowing_depth]} \
             {row_spacing [row_spacing]} {skiprow [skiprow]} {cultivar [cultivar]}
  } elseif {"[module]" == "oryza"} {
     apsimSendMessage [crop] sow {cultivar [cultivar]}
  } elseif {"[module]" == "sorghum"} {
     apsimSendMessage [crop] sow {Population [plants]} {sowing_depth [sowing_depth]} \
             {cultivar [cultivar]} {row_spacing [row_spacing]} {skiprow [skiprow]} \
             {tiller_no_fertile [tiller_no_fertile]}
  } elseif {"[module]" == "sugar"} {
     apsimSendMessage [crop] sow {Population [plants]} {cultivar [cultivar]} {sowing_depth [sowing_depth]}
  } else {
    error "Unknown crop module \"[module]\"."
  }
}
```
        rule Wheat Sowing Rule
          state = Wheat
          crop = wheat
          date1 = 15-may
          date2 = 10-jul
          raincrit = 25
          rainnumdays = 3
          esw_amount = 50
          must_sow = no
          cultivar = hartog
          plants = 100
          sowing_depth = 30
          row_spacing = 250
          fert_cost = ???
          criteria = variable
          skipplant = 0
          skiprow = 0
          class = plant
          module = plant
          on init:
          script: same as in Rotation Sample (Directed Graph).Paddock.Manager.Chickpea Sowing Rule
      outputfile: filename=Rotation Sample (Directed Graph).out; title=Rotation Sample (Directed Graph)
        variables
          variable:
            dd/mm/yyyy as Date  # Date (dd/mm/yyyy)
            Yield
            Biomass
        events Reporting Frequency: event=harvesting
