simulations: version=15
  simulation Sugar
    clock
      start_date = 1/01/1966  # Enter the start date of the simulation
      end_date = 31/12/1975  # Enter the end date of the simulation
    summaryfile: filename=Sugar Simulation.sum
    metfile met: filename=%apsim%\Examples\MetFiles\bhola.met
    area paddock
      registrations global
      soil: Site=Jimbour; Region=South East Queensland; LocalName=Waco; SoilType=Black Vertosol; NearestTown=Jimbour, Q 4352; NaturalVegetation=Grassland, mainly Qld bluegrass; Cona=3.5; DiffusConst=40; DiffusSlope=16; U=6; Salb=0.13; Cn2Bare=73; CnRed=20; CnCov=0.8; CnCanopyFact=1; RootCn=40; RootWt=200; SoilCn=12.5; EnrACoeff=7.4; EnrBCoeff=0.2
        profile
          layer:
            thickness  bd    ll15  airdry  dul   sat   sw       swcon  oc    ph   fbiom  finert  no3  nh4  ec    ll Barley  kl Barley  xf Barley  ll Chickpea  kl Chickpea  xf Chickpea  ll Lucerne  kl Lucerne  xf Lucerne  ll Maize  kl Maize  xf Maize  ll Perennial Grass  kl Perennial Grass  xf Perennial Grass  ll Sorghum  kl Sorghum  xf Sorghum  ll Wheat  kl Wheat  xf Wheat  ll Sugar  kl Sugar  xf Sugar
            150        1.02  0.29  0.14    0.54  0.59  9999.99  0.3    1.04  8.4  0.025  0.4     6.5  0.6  0.2   0.29       0.1        1          0.29         0.1          1            0.29        0.1         1           0.29      0.1       1         0.29                0.1                 1                   0.29        0.1         1           0.29      0.1       1         0.29      0.1       1
            150        1.03  0.29  0.26    0.53  0.58  9999.99  0.3    0.89  8.8  0.02   0.6     2.1  0.1  0.25  0.29       0.1        1          0.29         0.1          1            0.29        0.1         1           0.29      0.1       1         0.29                0.1                 1                   0.29        0.1         1           0.29      0.1       1         0.29      0.1       1
            300        1.02  0.29  0.29    0.54  0.59  9999.99  0.3    0.89  9    0.015  0.8     2.1  0.1  0.31  0.32       0.08       1          0.36         0.08         1            0.29        0.1         1           0.34      0.1       1         0.39                0.1                 1                   0.35        0.1         1           0.32      0.08      1         0.32      0.08      1
            300        1.02  0.29  0.29    0.54  0.58  9999.99  0.3    0.89  9.2  0.01   0.9     1.7  0.1  0.4   0.38       0.06       1          0.43         0.06         1            0.29        0.1         1           0.34      0.08      1         0.41                0.1                 1                   0.38        0.08        1           0.32      0.06      1         0.32      0.06      1
            300        1.06  0.3   0.3     0.52  0.57  9999.99  0.3    0.77  9.2  0.01   0.95    1.7  0.1  0.59  0.39       0.04       1          0.51         0.04         1            0.3         0.09        1           0.37      0.06      1         0.4                 0.09                1                   0.4         0.06        1           0.35      0.04      1         0.35      0.04      1
            300        1.11  0.31  0.31    0.5   0.55  9999.99  0.3    0.45  9.1  0.01   0.95    1.7  0.1  0.84  0.39       0.02       1          0.5          0.02         1            0.31        0.09        1           0.4       0.04      1         0.4                 0.07                1                   0.4         0.04        1           0.38      0.02      1         0.38      0.02      1
            300        1.12  0.32  0.32    0.5   0.55  9999.99  0.3    0.27  9    0.01   0.95    1.7  0.1  0.93  0.41       0.01       1          0.5          0.01         1            0.32        0.09        1           0.42      0.02      1         0.41                0.05                1                   0.4         0.02        1           0.41      0.01      1         0.41      0.01      1
            300        1.15  0.33  0.33    0.48  0.53  9999.99  0.3    0.22  9    0.01   0.95    1.7  0.1  1.01  0.48       0          0          0.48         0            0            0.33        0.09        1           0.48      0         0         0.41                0                   0                   0.48        0           0           0.48      0         0         0.48      0         0
            300        1.18  0.34  0.34    0.47  0.52  9999.99  0.3    0.16  8.9  0.01   0.95    1.7  0.1  1.06  0.47       0          0          0.47         0            0            0.34        0.09        1           0.47      0         0         0.4                 0                   0                   0.47        0           0           0.47      0         0         0.47      0         0
            300        1.2   0.35  0.35    0.46  0.51  9999.99  0.3    0.13  8.9  0.01   0.95    1.7  0.1  1.05  0.46       0          0          0.46         0            0            0.35        0.09        1           0.46      0         0         0.4                 0                   0                   0.46        0           0           0.46      0         0         0.46      0         0
            300        1.25  0.36  0.36    0.44  0.49  9999.99  0.3    0.12  8.9  0.01   0.95    1.7  0.1  1.01  0.44       0          0          0.44         0            0            0.36        0.09        1           0.44      0         0         0.42                0                   0                   0.44        0           0           0.44      0         0         0.44      0         0
        InitWater
          percentmethod: percent=0.5004617; distributed=filled from top
        InitNitrogen
          profile
            layer:
              no3    nh4    thickness
              6.500  0.600  150
              2.100  0.100  150
              2.100  0.100  300
              1.700  0.100  300
              1.700  0.100  300
              1.700  0.100  300
              1.700  0.100  300
              1.700  0.100  300
              1.700  0.100  300
              1.700  0.100  300
              1.700  0.100  300
      fertiliser
      sugar
      folder Manager folder
        manager SUGAR management
          category =  # Sugar plant crop management parameters
          crop = sugar  # Enter name of crop to sow
          planting_day = 1-apr  # Enter planting date (dd-mmm)
          plantlen = 450  # Duration of a plant crop (days) (30 days/month * 15 months)
          plant_stalks = 10  # Stalk density of plant crop (/m2)
          variety = q117  # Planting variety
          sowing_depth = 150  # Planting depth mm)
          category =  # Ratoon management parameters
          NoRatoons = 4  # Number of ratoons (max = 5)
          ratoonlen = 390  # Duration of a ratoon crop (days) (30 days/month * 13 months)
          ratoon_stalks = 10  # Stalk density of ratoon crop (/m2)
          on start_of_day:
```
            ! -----------------------------------------------------------------
            ! Book keeping to round days to integer values
            plantlen = nearest_int(plantlen)
            ratoonlen = nearest_int(ratoonlen)

            ! Initialise and set a time counter for entire run
            dah = 0

            if (sugar.crop_status = 'alive') then
               dah = 0

               ! Set harvest dates for each crop phase
               if (sugar.DaysAfterSowing = [plantlen] and ratoon_no = 0) or
                  (sugar.DaysAfterSowing = [ratoonlen] and ratoon_no > 0) then

                  sugar harvest

                  if (ratoon_no = [NoRatoons] + 1) then
                     ! plough the crop out
                     sugar kill_crop
                     sugar end_crop

                  else
                     ! Set stalk density
                     sugar.plants = [ratoon_stalks]
                  endif
               else
                  ! We have not reached the harvest date for this ratoon.
               endif

            elseif (sugar.crop_status = 'dead') then
               sugar harvest
               sugar end_crop

            elseif (sugar.crop_status = 'out') and (today = date('[planting_day]') then
               sugar sow plants = 10 (), cultivar = [variety], sowing_depth = [sowing_depth]
               sugar.plants = [plant_stalks]
               dah = 0

            else
               dah = dah + 1
            endif
```
          on init:
```
            nextcrop = 0
            fallowin = 0
            plantlen = 0
            ratoonlen = 0
```
        manager Fertilise on fixed date
          category =  # When should fertiliser be applied
          fert_date = 01-sep  # Enter fertiliser date (dd-mmm)
          fert_criteria = 1000  # Don't add fertiliser if N in top 2 layers exceeds (kg/ha)
          category =  # Fertiliser application details
          fertmodule = fertiliser  # Module used to apply the fertiliser
          fert_amount = 200  # Amount of fertiliser to apply (kg/ha)
          fert_type = urea_N  # Sowing fertiliser type
          on start_of_day:
```
         if (today = date('[fert_date]') then
            N_topsoil = no3(1) + nh4(1) + no3(2) + nh4(2)
            if (N_topsoil < [fert_criteria]) then
               [fertmodule] apply amount = [fert_amount] (kg/ha), depth = 50 (mm), type = [fert_type] ()
            endif
         endif
```
      outputfile
        variables
          variables: dd/mm/yyyy as Date, biomass, cane_wt, sucrose_wt, sw_demand, DaysAfterSowing, ratoon_no, crop_status, esw, lai, nfact_photo, root_depth, swdef_photo, canefw, radn, rain, maxt, mint
        events Reporting Frequency: event=post
