folder Simulations: version=36; creator=Apsim 7.7-r3765
  simulation agpasturePaddock
    metfile met: filename=%apsim%\Examples\MetFiles\lincoln.met
    clock
      start_date = 1/07/1980  # Enter the start date of the simulation
      end_date = 30/06/1981  # Enter the end date of the simulation
    summaryfile
    area pad
      manager Regular harvest or grazing
        # Regular harvest or grazing
        AgPasture = AgPasture  # Select the pasture name to harvest
        date1 = 01/07/1900  # Enter the first harvest or grazing date
        date2 = 31/12/2100  # Enter the final harvest or grazing date
        amount_type = SetResidueAmount  # Select the amount type
        amount = 1000  # Enter herbage amount (kg/ha)
        interval = 21  # Enter the interval between harvest or grazing (days)
        # Parameters for returned material
        dm_frac = 0.85  # Fraction of nitrogen returned as excreta
        urine_n_frac = 0.6  # Fraction of returned nitrogen in urine
        on init:
```
account = [interval] - 1
```
        on start_of_day:
```
account = account + 1
returned_dm = 0
removed_dm = 0
returned_n =0
removed_n =0
n_som = 0
n_urine = 0

if ((today >= date('[date1]') and (today <= date('[date2]')) then
   if (account = [interval]) then
      account = 0
      '[AgPasture]' graze type = '[amount_type]', amount = [amount] (kg/ha)
      removed_dm = [AgPasture].HarvestWt * [AgPasture].DefoliatedDigestibility
      returned_dm = [AgPasture].HarvestWt * (1.0 - [AgPasture].DefoliatedDigestibility)

      removed_n  = [AgPasture].HarvestN *(1.0 - [dm_frac])
      returned_n = [AgPasture].HarvestN * [dm_frac]
      n_som      = returned_n * (1.0 - [urine_n_frac])
      n_urine    = returned_n *  [urine_n_frac]
      n_urine1 = 0.7 * n_urine
      n_urine2 = 0.3 * n_urine
      'SurfaceOrganicMatter' add_surfaceom name = '[AgPasture]', type = RuminantDung_PastureFed, mass = returned_dm (kg/ha), n = n_som (kg/ha)
      depthUrine = 0.5 * dlayer(1)
      'fertiliser' apply amount =  n_urine1  (kg/ha), depth = depthUrine (mm), type = urea_n ()
      depthUrine = dlayer(1) + 0.5 * dlayer(2)
      'fertiliser' apply amount =  n_urine2  (kg/ha), depth = depthUrine (mm), type = urea_n ()
   endif
endif
```
      micromet
        soilalbedo = 0.23
        a_interception = 0
        b_interception = 0
        c_interception = 0
        d_interception = 0
      fertiliser
      irrigation
        automatic_irrigation = on
        asw_depth = 600  # Depth to which ASW is calculated. (mm)
        crit_fr_asw = 0.5  # Fraction of ASW below which irrigation is applied (0-1.0)
        irrigation_efficiency = 1  # Efficiency of the irrigation. (0-1.0)
        irrigation_allocation = off  # Allocation limits
        allocation = 0  # Allocation in mm
        default_no3_conc = 0  # Nitrate concentration (ppm N)
        default_nh4_conc = 0  # Ammonium concentration (ppm N)
        default_cl_conc = 0  # Chloride concentration (ppm Cl)
      surfaceom SurfaceOrganicMatter
        PoolName = AgPasture  # Organic Matter pool name
        type = grass  # Organic Matter type
        mass = 1000  # Initial surface residue (kg/ha)
        cnr = 15  # C:N ratio of initial residue
        standing_fraction = 0  # Fraction of residue standing
      Soil SoilLismore: SoilType=0; Site=Winchmore; NearestTown=Winchmore; Region=Canterbury; State=New Zealand; NaturalVegetation=0; ApsoilNumber=0; Latitude=0; Longitude=0; LocationAccuracy=0; YearOfSampling=0; DataSource=published soil profile description (as an example)
        InitialWater Initial water: FractionFull=0.99; PercentMethod=FilledFromTop
        Water
          Thickness  BD    AirDry  LL15  DUL   SAT
          100        1.25  0.06    0.14  0.32  0.45
          200        1.31  0.06    0.14  0.32  0.45
          300        1.23  0.03    0.03  0.07  0.15
          300        1.24  0.03    0.03  0.05  0.08
          300        1.25  0.03    0.03  0.05  0.08
          300        1.26  0.03    0.03  0.05  0.08
          300        1.29  0.03    0.03  0.05  0.08
          SoilCrop ryegrass_clover: LL=[0.14, 0.14, 0.03, 0.03, 0.03, 0.03, 0.03]; KL=[0.1, 0.1, 0.1, 0.02, 0, 0, 0]; XF=[1, 1, 1, 1, 0, 0, 0]
          SoilCrop agpasture: LL=[0.14, 0.14, 0.03, 0.03, 0.03, 0.03, 0.03]; KL=[0.1, 0.1, 0.1, 0.02, 0, 0, 0]; XF=[1, 1, 1, 1, 0, 0, 0]
          SoilCrop ryegrass: LL=[0.14, 0.14, 0.03, 0.03, 0.03, 0.03, 0.03]; KL=[0.1, 0.1, 0.1, 0.02, 0, 0, 0]; XF=[1, 1, 1, 1, 0, 0, 0]
          SoilCrop clover: LL=[0.14, 0.14, 0.03, 0.03, 0.03, 0.03, 0.03]; KL=[0.1, 0.1, 0.1, 0.02, 0, 0, 0]; XF=[1, 1, 1, 1, 0, 0, 0]
          SoilCrop maize: LL=[0.14, 0.14, 0.03, 0.02, 0.02, 0.02, 0.02]; KL=[0.06, 0.06, 0.06, 0.06, 0.06, 0.06, 0.06]; XF=[1, 1, 1, 1, 1, 1, 1]
          SoilCrop cotton: LL=[0.14, 0.14, 0.03, 0.02, 0.02, 0.02, 0.02]; KL=[0.1, 0.1, 0.1, 0.1, 0.09, 0.07, 0.05]; XF=[1, 1, 1, 1, 1, 1, 1]
          SoilCrop sorghum: LL=[0.14, 0.14, 0.03, 0.02, 0.02, 0.02, 0.02]; KL=[0.07, 0.07, 0.07, 0.05, 0.05, 0.04, 0.03]; XF=[1, 1, 1, 1, 1, 1, 0.9]
          SoilCrop slurp: LL=[0.14, 0.14, 0.03, 0.02, 0.02, 0.02, 0.02]; KL=[0.06, 0.06, 0.06, 0.06, 0.06, 0.06, 0.06]; XF=[1, 1, 1, 1, 1, 1, 1]
        SoilWater: SummerCona=3.5; SummerU=6; SummerDate=1-Nov; WinterCona=2; WinterU=2; WinterDate=1-apr; DiffusConst=88; DiffusSlope=35; Salb=0.13; CN2Bare=73; CNRed=20; CNCov=0.8; Thickness=[100, 200, 300, 300, 300, 300, 300]; SWCON=[0.4, 0.5, 0.6, 0.6, 0.8, 0.8, 0.8]
        SoilOrganicMatter: RootCN=40; RootWt=800; SoilCN=11.3; EnrACoeff=7.4; EnrBCoeff=0.2
          Thickness  OC   FBiom  FInert
          100        4    0.04   0.3
          200        2.5  0.02   0.5
          300        0.5  0.02   0.6
          300        0.1  0.01   0.8
          300        0.1  0.01   1
          300        0    0      1
          300        0    0      1
        Analysis: Thickness=[100, 200, 300, 300, 300, 300, 300]; PH=[5.9, 5.9, 5.9, 5.9, 5.9, 5.9, 5.9]
        Sample Initial nitrogen
          Thickness  NO3      NH4
          100        7.61905  0.132451
          200        7.27008  0.132451
          300        3.87147  0.132451
          300        3.84025  0.132451
          300        3.80952  0.132451
          300        3.77929  0.132451
          300        3.6914   0.132451
      AgPasture
        # Initial values for each species to be simulated
        speciesToSimulate = Ryegrass    WhiteClover  # Name of the species to be simulated
        iniShootDM = 1500   500  # Initial above ground dry matter weight (kgDM/ha)
        iniRootDM = 450     150  # Initial root dry matter weight (kgDM/ha)
        iniRootDepth = 750     350  # Initial rooting depth (mm)
        WaterUptakeSource = calc  # Water uptake done by AgPasture (calc) or by apsim?
      outputfile: filename=agpasturePaddock pad.out; title=agpasturePaddock pad
        variables
          variables: dd/mmm/yyyy as Date, AboveGroundLiveWt, HerbageGrowthWt, HarvestWt, SpeciesStandingLiveWt, LAI_total, surfaceom_wt
        events Reporting Frequency: event=end_day
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