folder simulations: version=23
  simulation Continuous Wheat
    memo
      This simulation tests that the new manager module (in script in the paddock) can send a remove_crop_biomass event to a specific crop (lucernce).
    metfile met: filename=%apsim%\Examples\MetFiles\goond.met
    clock
      start_date = 1/01/1940  # Enter the start date of the simulation
      end_date = 31/12/1940  # Enter the end date of the simulation
    summaryfile: filename=Continuous Wheat Simulation.sum
    area paddock
      surfaceom surface organic matter
        PoolName = wheat  # Organic Matter pool name
        type = wheat  # Organic Matter type
        mass = 1000  # Initial surface residue (kg/ha)
        cnr = 80  # C:N ratio of initial residue
        standing_fraction = 0  # Fraction of residue standing
      fertiliser
      folder Manager folder
        manager Sowing rule
          # Sowing criteria
          date1 = 15-may  # Enter sowing window START date (dd-mmm)
          date2 = 10-jul  # Enter sowing window END date (dd-mmm)
          must_sow = yes  # Must sow?
          raincrit = 30  # Amount of rainfall
          rainnumdays = 3  # Number of days of rainfall
          esw_amount = 200  # Enter minimum allowable available soil water (mm)
          # Sowing parameters
          crop = lucerne  # Enter name of crop to sow
          density = 100  # Enter sowing density (plants/m2)
          depth = 30  # Enter sowing depth (mm)
          cultivar = aquarius  # Enter cultivar
          class = plant  # Enter crop growth class
          row_spacing = 250  # Enter row spacing (mm)
          on start_of_day:
```
      if (paddock_is_fallow() = 1 and FallowIn <> 'yes' and (NextCrop = 0 or NextCrop = '[crop]')) then
         if (date_within('[date1], [date2]') = 1) then
            if (rain[[rainnumdays]] >= [raincrit] AND esw >= [esw_amount]) OR
                ('[must_sow]' = 'yes' AND today = date('[date2]'))) THEN
               ChooseNextCrop = 'yes'   ! for rotations
               [crop] sow plants =[density], sowing_depth = [depth], cultivar = [cultivar], row_spacing = [row_spacing], crop_class = [class]
            endif
            if today = date('[date2]') then
               ChooseNextCrop = 'yes'
            endif
         endif
      endif
```
          on init:
```
            nextcrop = 0
            fallowin = 0
```
      outputfile
        variables
          variables: dd/mm/yyyy as Date, biomass, yield, grain_protein, grain_size, esw, flowering_count, stagename
        events Reporting Frequency: event=daily
      soil: Country=Australia; State=South Australia; Region=Upper North; NearestTown=Quorn; Site=Quorn; ApsoilNumber=605; SoilType=Clay loam over medium clay; Latitude=-32.321; Longitude=138.026; LocationAccuracy=+-20m
        DataSource=Characterisation 2008 by University of Adelaide, CSIRO Sustainable Ecosystems and Rural Solutions Jamestown
        Comments=LB code:QRN; Moderate-high clay strongly duplex soil with moderate bulk density, high CEC. Texture change at about 6cm depth. Impediment to root growth likely below about 50cm due to high ESP, EC and chloride. DM Description: 0-6cm Clay Loam 2.5YR 3/4;  6
        Water
          Layer:
            Thickness (mm)  BD (g/cc)  SAT (mm/mm)  DUL (mm/mm)  LL15 (mm/mm)  Airdry (mm/mm)
            100             1.205      0.515        0.362        0.169         0.085
            100             1.335      0.466        0.355        0.187         0.15
            250             1.338      0.465        0.347        0.215         0.215
            250             1.396      0.443        0.393        0.215         0.215
            350             1.405      0.44         0.39         0.215         0.215
            450             1.396      0.443        0.393        0.215         0.215
          SoilCrop wheat
            Layer:
              Thickness (mm)  ll (mm/mm)  kl (/day)  xf (0-1)
              100             0.169       0.06       1
              100             0.187       0.06       1
              250             0.215       0.06       1
              250             0.246       0.05       1
              350             0.292       0.04       1
              450             0.354       0.02       1
          SoilCrop lucerne: same as Continuous Wheat.paddock.Soil.Water.wheat
        Lab
          Layer:
            Rocks (%)  Thickness (mm)  Texture      EC (1:5 dS/m)  PH (1:5 water)  CL (mg/kg)  Boron (Hot CaCl2)  CEC (cmol+/kg)  Ca (cmol+/kg)  Mg (cmol+/kg)  Na (cmol+/kg)  K (cmol+/kg)  ESP (%)  ParticleSizeSand (%)  ParticleSizeSilt (%)  ParticleSizeClay (%)
            0          100             Light Clay   0.3            8.3             184         1.6                34              26.3           4.9            1.4            1.4           4.2      40.7                  13.5                  45.8
            0          100             Light Clay   0.3            8.6             255         1.4                32.9            23.8           5.6            2.5            1             7.7      40.7                  12.6                  46.6
            0          250             Medium Clay  0.7            8.9             724         3.2                31.5            17             8              5.6            0.9           17.8     32.7                  13.1                  54.2
            0          250             Heavy Clay   1.1            9.1             1073        15.9               31.3            12.2           9.3            8.8            1             28       29.1                  12.7                  58.3
            0          350             Heavy Clay   2              8.8             1583        23.1               35              13.4           9.6            10.8           1.2           31       27                    11.7                  61.2
            0          450             Heavy Clay   3.4            8.4             2449        27                 39.4            15.9           9.9            12.4           1.2           31.5     28.1                  12.6                  59.3
        SoilWat: SummerU=6; SummerCona=3.5; WinterU=2; WinterCona=2; SummerDate=1-Nov; WinterDate=1-Apr; Salb=0.13; DiffusConst=88; DiffusSlope=35; Cn2Bare=73; CnRed=20; CnCov=0.8
          Layer:
            SWCON (0-1)  Thickness (mm)
            0.4          100
            0.3          100
            0.3          250
            0.3          250
            0.3          350
            0.3          450
        SoilOrganicMatter: RootCn=40; RootWt=1000; SoilCn=12; EnrACoeff=7.4; EnrBCoeff=0.2
          Layer:
            FBIOM (0-1)  Thickness (mm)  FINERT (0-1)  OC (Walkley Black %)
            0.04         100             0.4           0.77
            0.04         100             0.5           0.71
            0.02         250             0.6           0.42
            0.02         250             0.7           0.27
            0.01         350             0.8           0.21
            0.01         450             1             0.12
        Sample
          Layer:
            no3 (kg/ha)  nh4 (kg/ha)  SW (mm/mm)  Depth (cm)  NH4  NO3
            30           5            0.1         0-20        -    -
            20           1            0.25        20-200      -    -
            -            -            0.25        200-300     1    15
      lucerne
      wheat
      manager2 Script
```vb
Imports System
Imports ModelFramework

Public Class Script
   Inherits Instance

   <Input()> Private Day As Integer

   <EventHandler()> Public Sub OnPost()
      Dim MyPaddock As New PaddockType(Me)
      
      Dim dlt(0) As Double
      dlt(0) = 100
      
      Dim part(0) As String
      part(0) = "Leaf"
      
      Dim dms(0) As RemoveCropDmdmType
      dms(0) = New RemoveCropDmdmType
      dms(0).dlt = dlt
      dms(0).part = part
      dms(0).pool = "Pool"
      
      
      Dim MyRemoveCropDM As New RemoveCropDmType
      MyRemoveCropDM.dm = dms
      
      ' Make sure we can send an event using the ComponentByName method.
      If Day = 300 Then
         MyPaddock.ComponentByName("lucerne").Publish("remove_crop_biomass", MyRemoveCropDM)
      End If
      
      ' Make sure we can send an event using the Crops method.
      If Day = 305 Then
         Dim c As CropType = MyPaddock.Crops(0)
         c.Publish("remove_crop_biomass", MyRemoveCropDM)
      End If
      
      
   End Sub
End Class
```
