folder simulations: version=28
  simulation W0R15
    metfile met: filename=Roseworthy.met
    clock
      start_date = 09/06/2003  # Enter the start date of the simulation
      end_date = 31/12/2003  # Enter the end date of the simulation
    summaryfile
    area paddock
      surfaceom surface organic matter
        PoolName = wheat  # Organic Matter pool name
        type = wheat  # Organic Matter type
        mass = 1000  # Initial surface residue (kg/ha)
        cnr = 80  # C:N ratio of initial residue
        standing_fraction = 0  # Fraction of residue standing
      fertiliser
      outputfile: filename=W0R15.out; title=W0R15
        variables
          variables: day, year, dd/mm/yyyy as date, height as R_height, lai as R_lai, leaf_no as R_leaf_no, leaf_no_sen as R_leaf_no_sen, biomass as R_biomass, leafgreenwt as R_leafgreenwt, stemgreenwt as R_stemgreenwt, grain_wt as R_grain_wt, yield as R_yield
        events Reporting Frequency: event=daily
      soil Buckby (Roseworthy): Country=Australia; Site=Roseworthy; Region=Mid North; State=South Australia
        SoilType = Red Brown Earth  # Classification
        NearestTown = Roseworthy
        ApsoilNumber = 300
        Latitude = -34.5  # Latitude (WGS84)
        Longitude = 138.686  # Longitude (WGS84)
        LocationAccuracy = +-20m
        DataSource = Characterisation 2005 by University of Adelaide, CSIRO Sustainable Ecosystems and DWLBC. Measurement site located adjacent to site described by Soil and Land Information Group, Department of Water, Land and Biodiversity Conservation, South Australia.
        Comments = Soil naming structure: \soils\Australia\South Australia\Region\Classification (Location APSoil No). LB code: RWN3; Low-moderate clay duplex soil with moderate CEC, moderate-high bulk density.Texture change about 10cm. Slaking or dispersion likely in the l
        Water
          Layer:
            Thickness (mm)  BD (g/cc)  Airdry (mm/mm)  LL15 (mm/mm)  DUL (mm/mm)  SAT (mm/mm)
            200             1.33       0.05            0.104         0.3          0.35
            200             1.22       0.05            0.104         0.3          0.35
            200             1.33       0.09            0.115         0.3          0.35
            200             1.38       0.11            0.146         0.3          0.35
            200             1.44       0.12            0.178         0.3          0.35
            200             1.53       0.13            0.202         0.336        0.38
            200             1.47       0.14            0.257         0.358        0.41
            200             1.49       0.15            0.318         0.387        0.41
            200             1.52       0.16            0.354         0.4          0.41
          SoilCrop wheat
            Layer:
              Thickness (mm)  ll (mm/mm)  kl (/day)  xf (0-1)
              200             0.104       0.06       1
              200             0.104       0.06       1
              200             0.12        0.06       1
              200             0.16        0.06       1
              200             0.19        0.4        1
              200             0.25        0.4        1
              200             0.358       0.2        1
              200             0.387       0.2        1
              200             0.4         0.2        1
          SoilCrop raphanus_raphanistrum
            Layer:
              Thickness (mm)  ll (mm/mm)  kl (/day)  xf (0-1)
              200             0.104       0.06       1
              200             0.128       0.06       1
              200             0.18        0.06       1
              200             0.22        0.06       1
              200             0.262       0.06       1
              200             0.336       0.06       1
              200             0.358       0.04       1
              200             0.387       0.04       1
              200             0.4         0.04       1
          SoilCrop peas
            Layer:
              Thickness (mm)  ll (mm/mm)  kl (/day)  xf (0-1)
              150             0.07        0.06       1
              150             0.22        0.06       1
              300             0.22        0.06       1
              300             0.28        0.06       1
              300             0.27        0.06       0.4
              300             0.23        0.06       0.32
        SoilWat
          Layer:
            Thickness (mm)  SWCON (0-1)
            200             0.2
            200             0.2
            200             0.2
            200             0.2
            200             0.2
            200             0.2
            200             0.2
            200             0.2
            200             0.2
          SummerCona = 3.5
          SummerU = 6
          SummerDate = 1-Nov
          WinterCona = 2
          WinterU = 2
          WinterDate = 1-Apr
          DiffusConst = 88
          DiffusSlope = 35.4
          Salb = 0.13
          Cn2Bare = 80
          CnRed = 20
          CnCov = 0.8
        SoilOrganicMatter
          Layer:
            Thickness (mm)  OC (Walkley Black %)  FBIOM (0-1)  FINERT (0-1)
            200             1.42                  0.035        0.3
            200             0.66                  0.025        0.5
            200             0.36                  0.015        0.6
            200             0.29                  0.01         0.75
            200             0.26                  0.01         0.9
            200             0.21                  0.01         0.99
            200             0.12                  0.01         0.99
            200             0.1                   0.01         0.99
            200             0.07                  0.01         0.99
          RootCn = 20
          RootWt = 1000
          SoilCn = 24.7
          EnrACoeff = 7.4
          EnrBCoeff = 0.2
        Analysis
          Layer:
            Thickness (mm)  Rocks (%)  Texture                EC (1:5 dS/m)  PH (CaCl2)  CL (mg/kg)  CEC (cmol+/kg)  Ca (cmol+/kg)  Mg (cmol+/kg)  Na (cmol+/kg)  K (cmol+/kg)  ESP (%)  ParticleSizeSand (%)  ParticleSizeSilt (%)  ParticleSizeClay (%)
            200             0          Sandy loam             0.1            7.9         21          13.7            9.2            3.3            0.5            0.7           3.64964  73                    4                     22
            200             0          Light sandy clay loam  0.2            8           28          25.7            16.7           7.1            1.2            0.7           4.66926  44                    4                     52
            200             0          Medium clay            0.2            8.3         66          23.6            13.8           7.2            2              0.6           8.47458  39                    8                     53
            200             0          Medium clay            0.5            8.55        250         25              8.5            8.9            6.9            0.7           27.6     39                    8                     52
            200             0          Medium clay            0.9            8.65        510         26.1            5.7            9.6            9.8            1             37.5479  48                    7                     45
            200             0          Medium clay            1              8.8         736         24.8            3.8            9.8            10.2           1             41.129   51                    5                     43
            200             -          -                      -              8.8         -           -               -              -              -              -             -        -                     -                     -
            200             -          -                      -              8.6         -           -               -              -              -              -             -        -                     -                     -
            200             -          -                      -              8           -           -               -              -              -              -             -        -                     -                     -
        Sample Soil sample
          Layer:
            Thickness (mm)  NO3 (ppm)  NH4 (ppm)  SW (mm/mm)
            200             19         34         0.3
            200             12         10.5       0.3
            200             8          3          0.3
            200             2.5        2          0.3
            200             2.5        1.5        0.3
            200             5          1          0.336
            200             6          1          0.358
            200             8          1          0.387
            200             9          1          0.4
      folder Manager folder
        manager Harvesting rule
          # Harvesting criteria
          crop = raphanus_raphanistrum  # Enter name of crop to harvest when ripe
          on end_of_day:
```
           if [crop].StageName = 'harvest_ripe' or [crop].plant_status = 'dead' then
              [crop]  harvest
              [crop]  end_crop
           endif
```
        operations Operations Schedule
          10/06/2003  Raphanus_raphanistrum sow plants =15, sowing_depth = 30, cultivar = PacN145, row_spacing = 250, crop_class = plant
          10/06/2003  fertiliser apply amount = 57 (kg/ha), depth = 50 (mm), type = NO3_N
          10/06/2003  fertiliser apply amount = 12 (kg/ha), depth = 50 (mm), type = NO3_N
      Raphanus_raphanistrum
      outputfile stress: filename=W0R15 stress.out; title=W0R15 stress
        variables
          variables: day, year, dd/mm/yyyy as date, n_stress_expan, n_stress_grain, n_stress_pheno, n_stress_photo, sw_stress_expan, sw_stress_fixation, sw_stress_pheno, sw_stress_photo, sw, esw
        events Reporting Frequency: event=daily
  simulation W0R30
    metfile met: filename=Roseworthy.met
    clock
      start_date = 01/04/2003  # Enter the start date of the simulation
      end_date = 31/12/2003  # Enter the end date of the simulation
    summaryfile
    area paddock
      surfaceom surface organic matter
        PoolName = wheat  # Organic Matter pool name
        type = wheat  # Organic Matter type
        mass = 1000  # Initial surface residue (kg/ha)
        cnr = 80  # C:N ratio of initial residue
        standing_fraction = 0  # Fraction of residue standing
      fertiliser
      folder Manager folder
        manager Harvesting rule
          # Harvesting criteria
          crop = raphanus_raphanistrum  # Enter name of crop to harvest when ripe
          on end_of_day:
          script: same as in W0R15.paddock.Manager folder.Harvesting rule
        operations Operations Schedule
          10/06/2003  Raphanus_raphanistrum sow plants =30, sowing_depth = 10, cultivar = PacN145, row_spacing = 170, crop_class = plant
          10/06/2003  fertiliser apply amount = 123 (kg/ha), depth = 50 (mm), type = urea()
          10/06/2003  fertiliser apply amount = 19 (kg/ha), depth = 50 (mm), type = nh4_n()
      Raphanus_raphanistrum
      outputfile: filename=W0R30.out; title=W0R30
        variables
          variables: day, year, dd/mm/yyyy as date, height as R_height, lai as R_lai, leaf_no as R_leaf_no, leaf_no_sen as R_leaf_no_sen, biomass as R_biomass, leafgreenwt as R_leafgreenwt, stemgreenwt as R_stemgreenwt, grain_wt as R_grain_wt, yield as R_yield
        events Reporting Frequency: event=daily
      soil Buckby (Roseworthy): Country=Australia; Site=Roseworthy; Region=Mid North; State=South Australia
        SoilType = Red Brown Earth  # Classification
        NearestTown = Roseworthy
        ApsoilNumber = 300
        Latitude = -34.5  # Latitude (WGS84)
        Longitude = 138.686  # Longitude (WGS84)
        LocationAccuracy = +-20m
        DataSource = Characterisation 2005 by University of Adelaide, CSIRO Sustainable Ecosystems and DWLBC. Measurement site located adjacent to site described by Soil and Land Information Group, Department of Water, Land and Biodiversity Conservation, South Australia.
        Comments = Soil naming structure: \soils\Australia\South Australia\Region\Classification (Location APSoil No). LB code: RWN3; Low-moderate clay duplex soil with moderate CEC, moderate-high bulk density.Texture change about 10cm. Slaking or dispersion likely in the l
        Water: same as W0R15.paddock.Buckby (Roseworthy).Water
        SoilWat: same as W0R15.paddock.Buckby (Roseworthy).SoilWat
        SoilOrganicMatter: same as W0R15.paddock.Buckby (Roseworthy).SoilOrganicMatter
        Analysis
          Layer:
            Thickness (mm)  Rocks (%)  Texture                EC (1:5 dS/m)  PH (CaCl2)  CL (mg/kg)  CEC (cmol+/kg)  Ca (cmol+/kg)  Mg (cmol+/kg)  Na (cmol+/kg)  K (cmol+/kg)  ESP (%)  ParticleSizeSand (%)  ParticleSizeSilt (%)  ParticleSizeClay (%)
            200             0          Sandy loam             0.1            7.9         21          13.7            9.2            3.3            0.5            0.7           3.64964  73                    4                     22
            200             0          Light sandy clay loam  0.2            8           28          25.7            16.7           7.1            1.2            0.7           4.66926  44                    4                     52
            200             0          Medium clay            0.2            8.3         66          23.6            13.8           7.2            2              0.6           8.47458  39                    8                     53
            200             0          Medium clay            0.5            8.55        250         25              8.5            8.9            6.9            0.7           27.6     39                    8                     52
            200             0          Medium clay            0.9            8.65        510         26.1            5.7            9.6            9.8            1             37.5479  48                    7                     45
            200             0          Medium clay            1              8.8         736         24.8            3.8            9.8            10.2           1             41.129   51                    5                     43
            200             -          -                      -              8.8         -           -               -              -              -              -             -        -                     -                     -
            200             -          -                      -              8.6         -           -               -              -              -              -             -        -                     -                     -
            200             -          -                      -              8           -           -               -              -              -              -             -        -                     -                     -
        Sample Soil sample: same as W0R15.paddock.Buckby (Roseworthy).Soil sample
  simulation W0R60
    metfile met: filename=Roseworthy.met
    clock
      start_date = 01/04/2003  # Enter the start date of the simulation
      end_date = 31/12/2003  # Enter the end date of the simulation
    summaryfile
    area paddock
      surfaceom surface organic matter
        PoolName = wheat  # Organic Matter pool name
        type = wheat  # Organic Matter type
        mass = 1000  # Initial surface residue (kg/ha)
        cnr = 80  # C:N ratio of initial residue
        standing_fraction = 0  # Fraction of residue standing
      fertiliser
      folder Manager folder
        manager Harvesting rule
          # Harvesting criteria
          crop = raphanus_raphanistrum  # Enter name of crop to harvest when ripe
          on end_of_day:
          script: same as in W0R15.paddock.Manager folder.Harvesting rule
        operations Operations Schedule
          10/06/2003  Raphanus_raphanistrum sow plants =60, sowing_depth = 10, cultivar = PacN145, row_spacing = 120, crop_class = plant
          10/06/2003  fertiliser apply amount = 123 (kg/ha), depth = 50 (mm), type = urea()
          10/06/2003  fertiliser apply amount = 19 (kg/ha), depth = 50 (mm), type = nh4_n()
      Raphanus_raphanistrum
      outputfile: filename=W0R60.out; title=W0R60
        variables
          variables: day, year, dd/mm/yyyy as date, height as R_height, lai as R_lai, leaf_no as R_leaf_no, leaf_no_sen as R_leaf_no_sen, biomass as R_biomass, leafgreenwt as R_leafgreenwt, stemgreenwt as R_stemgreenwt, grain_wt as R_grain_wt, yield as R_yield
        events Reporting Frequency: event=daily
      soil Buckby (Roseworthy): same as W0R30.paddock.Buckby (Roseworthy)
  simulation 84W0R15Ry0
    metfile met: filename=Roseworthy.met
    clock
      start_date = 16/06/2004  # Enter the start date of the simulation
      end_date = 31/12/2004  # Enter the end date of the simulation
    summaryfile
    area paddock
      surfaceom surface organic matter
        PoolName = wheat  # Organic Matter pool name
        type = wheat  # Organic Matter type
        mass = 1000  # Initial surface residue (kg/ha)
        cnr = 80  # C:N ratio of initial residue
        standing_fraction = 0  # Fraction of residue standing
      fertiliser
      outputfile: filename=84W0R15Ry0.out; title=84W0R15Ry0
        variables
          variables: day, year, dd/mm/yyyy as date, height as R_height, lai as R_lai, leaf_no as R_leaf_no, leaf_no_sen as R_leaf_no_sen, biomass as R_biomass, leafgreenwt as R_leafgreenwt, stemgreenwt as R_stemgreenwt, grain_wt as R_grain_wt, yield as R_yield
        events Reporting Frequency: event=daily
      folder Manager folder
        manager Harvesting rule
          # Harvesting criteria
          crop = raphanus_raphanistrum  # Enter name of crop to harvest when ripe
          on end_of_day:
          script: same as in W0R15.paddock.Manager folder.Harvesting rule
        operations Operations Schedule
          17/06/2004  Raphanus_raphanistrum sow plants =15, sowing_depth = 10, cultivar = PacN145, row_spacing = 250, crop_class = plant
          17/06/2004  fertiliser apply amount = 57 (kg/ha), depth = 50 (mm), type = NO3_N
          17/06/2004  fertiliser apply amount = 12 (kg/ha), depth = 50 (mm), type = NO3_N
      Raphanus_raphanistrum
      outputfile stress: filename=84W0R15Ry0 stress.out; title=84W0R15Ry0 stress
        variables
          variables: day, year, dd/mm/yyyy as date, n_stress_expan, n_stress_grain, n_stress_pheno, n_stress_photo, sw_stress_expan, sw_stress_fixation, sw_stress_pheno, sw_stress_photo, sw, esw
        events Reporting Frequency: event=daily
      soil soil (2004)
        Water
          Layer:
            Thickness (mm)  BD (g/cc)  AirDry (mm/mm)  LL15 (mm/mm)  DUL (mm/mm)  SAT (mm/mm)
            200             1.17       .05             .077          .271         .430
            200             1.12       .05             .104          .277         .47
            200             1.12       .11             .120          .295         .450
            200             1.21       .11             .146          .303         .44
            200             1.24       .12             .178          .289         .42
            200             1.28       .13             .202          .37          .380
            200             1.29       .14             .257          .400         .410
            200             1.28       .15             .318          .400         .410
            200             1.29       .16             .354          .400         .410
          SoilCrop raphanus_raphanistrum
            Layer:
              Thickness (mm)  LL (mm/mm)  KL (/day)  XF (0-1)
              200             .046        0.06       1.0
              200             .132        0.06       1.0
              200             .205        0.04       1.0
              200             .234        0.04       1.0
              200             .253        0.04       1.0
              200             .256        0.03       1.0
              200             .254        0.03       1.0
              200             .268        0.02       1.0
              200             .279        0.02       1.0
        SoilWat: SummerCona=2; SummerU=2; SummerDate=1-Nov; WinterCona=2; WinterU=2; WinterDate=1-Apr; DiffusConst=88.; DiffusSlope=35.0; Salb=0.13; Cn2Bare=73; CnRed=20; CnCov=.8
          Layer:
            Thickness (mm)  SWCON (0-1)
            200             0.2
            200             0.2
            200             0.2
            200             0.2
            200             0.2
            200             0.2
            200             0.2
            200             0.2
            200             0.2
        SoilOrganicMatter: RootCn=20.; RootWt=1000.; SoilCn=24.7; EnrACoeff=7.4; EnrBCoeff=0.2
          Layer:
            Thickness (mm)  OC (Total %)  FBiom (0-1)  FInert (0-1)
            200             1.34          .035         0.30
            200             0.71          .025         0.50
            200             0.42          .015         0.60
            200             0.31          0.01         0.75
            200             0.27          0.01         0.90
            200             0.26          0.01         0.99
            200             0.22          0.01         0.99
            200             0.21          0.01         0.99
            200             0.23          0.01         0.99
        Analysis
          Layer:
            Thickness (mm)  Texture  EC (1:5 dS/m)  PH (1:5 water)
            200             3        0.28           8.20
            200             3        0.724          8.90
            200             3        1.116          9.10
            200             3.5      1.314          9.10
            200             3.5      1.623          9.10
            200             3.5      1.799          9.10
            200             3.5      1.552          9.30
            200             3.5      1.368          9.30
            200             3.5      1.353          9.20
        Sample Initial nitrogen
          Layer:
            Thickness (mm)  NO3 (ppm)  NH4 (ppm)
            200             5          8
            200             5          2
            200             1          1
            200             1          1
            200             2          1
            200             3          1
            200             3          1
            200             4          1
            200             4          1
        Sample Initial water
          Layer:
            Thickness (mm)  SW (mm/mm)
            200             0.24
            200             0.26
            200             0.33
            200             0.35
            200             0.37
            200             0.39
            200             0.40
            200             0.40
            200             0.40
  simulation 84W0R30Ry0
    metfile met: filename=Roseworthy.met
    clock
      start_date = 16/06/2004  # Enter the start date of the simulation
      end_date = 31/12/2004  # Enter the end date of the simulation
    summaryfile
    area paddock
      surfaceom surface organic matter
        PoolName = wheat  # Organic Matter pool name
        type = wheat  # Organic Matter type
        mass = 1000  # Initial surface residue (kg/ha)
        cnr = 80  # C:N ratio of initial residue
        standing_fraction = 0  # Fraction of residue standing
      fertiliser
      outputfile: filename=84W0R30Ry0.out; title=84W0R30Ry0
        variables
          variables: day, year, dd/mm/yyyy as date, height as R_height, lai as R_lai, leaf_no as R_leaf_no, leaf_no_sen as R_leaf_no_sen, biomass as R_biomass, leafgreenwt as R_leafgreenwt, stemgreenwt as R_stemgreenwt, grain_wt as R_grain_wt, yield as R_yield
        events Reporting Frequency: event=daily
      folder Manager folder
        manager Harvesting rule
          # Harvesting criteria
          crop = raphanus_raphanistrum  # Enter name of crop to harvest when ripe
          on end_of_day:
          script: same as in W0R15.paddock.Manager folder.Harvesting rule
        operations Operations Schedule
          17/06/2004  Raphanus_raphanistrum sow plants =30, sowing_depth = 10, cultivar = PacN145, row_spacing = 170, crop_class = plant
          17/06/2004  fertiliser apply amount = 57 (kg/ha), depth = 50 (mm), type = NO3_N
          17/06/2004  fertiliser apply amount = 12 (kg/ha), depth = 50 (mm), type = NO3_N
      Raphanus_raphanistrum
      outputfile stress: filename=84W0R30Ry0 stress.out; title=84W0R30Ry0 stress
        variables
          variables: day, year, dd/mm/yyyy as date, n_stress_expan, n_stress_grain, n_stress_pheno, n_stress_photo, sw_stress_expan, sw_stress_fixation, sw_stress_pheno, sw_stress_photo, sw, esw
        events Reporting Frequency: event=daily
      soil soil (2004): same as 84W0R15Ry0.paddock.soil (2004)
  simulation 84W0R60Ry0
    metfile met: filename=Roseworthy.met
    clock
      start_date = 16/06/2004  # Enter the start date of the simulation
      end_date = 31/12/2004  # Enter the end date of the simulation
    summaryfile
    area paddock
      surfaceom surface organic matter
        PoolName = wheat  # Organic Matter pool name
        type = wheat  # Organic Matter type
        mass = 1000  # Initial surface residue (kg/ha)
        cnr = 80  # C:N ratio of initial residue
        standing_fraction = 0  # Fraction of residue standing
      fertiliser
      outputfile: filename=84W0R60Ry0.out; title=84W0R60Ry0
        variables
          variables: day, year, dd/mm/yyyy as date, height as R_height, lai as R_lai, leaf_no as R_leaf_no, leaf_no_sen as R_leaf_no_sen, biomass as R_biomass, leafgreenwt as R_leafgreenwt, stemgreenwt as R_stemgreenwt, grain_wt as R_grain_wt, yield as R_yield
        events Reporting Frequency: event=daily
      folder Manager folder
        manager Harvesting rule
          # Harvesting criteria
          crop = raphanus_raphanistrum  # Enter name of crop to harvest when ripe
          on end_of_day:
          script: same as in W0R15.paddock.Manager folder.Harvesting rule
        operations Operations Schedule
          17/06/2004  Raphanus_raphanistrum sow plants =30, sowing_depth = 10, cultivar = PacN145, row_spacing = 120, crop_class = plant
          17/06/2004  fertiliser apply amount = 57 (kg/ha), depth = 50 (mm), type = NO3_N
          17/06/2004  fertiliser apply amount = 12 (kg/ha), depth = 50 (mm), type = NO3_N
      Raphanus_raphanistrum
      outputfile stress: filename=84W0R60Ry0 stress.out; title=84W0R60Ry0 stress
        variables
          variables: day, year, dd/mm/yyyy as date, n_stress_expan, n_stress_grain, n_stress_pheno, n_stress_photo, sw_stress_expan, sw_stress_fixation, sw_stress_pheno, sw_stress_photo, sw, esw
        events Reporting Frequency: event=daily
      soil soil (2004): same as 84W0R15Ry0.paddock.soil (2004)
  memo
    	Note: If you have Observered data for some samplings but not others, then in the .out file (for the observations) you can use * or ?  for those missing values instead of using 0

    	This allows you to tell the difference between data you did not collect, and data that actually had a value of 0

    	Data with a * or ? is not plotted on the graph (hence neither is its predicted value) whereas data with 0 is.
  memo: same as memo
  memo: same as memo
  memo: same as memo
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