folder simulations: version=34
  folder Expt324
    simulation Expt324N3
      metfile met: filename=%apsim%\Tests\Validation\OilPalm\Cairns.met
      clock
        start_date = 01/01/1996  # Enter the start date of the simulation
        end_date = 31/12/2010  # Enter the end date of the simulation
      summaryfile
      area paddock
        OilPalm
        fertiliser
        surfaceom surface organic matter
          PoolName = wheat  # Organic Matter pool name
          type = wheat  # Organic Matter type
          mass = 2000  # Initial surface residue (kg/ha)
          cnr = 80  # C:N ratio of initial residue
          standing_fraction = 0  # Fraction of residue standing
        folder Manager folder
          operations
            1-jan  fertiliser apply amount= 200 (kg/ha), type= urea_N (), depth= 10 (mm)
          irrigation
            automatic_irrigation = on
            asw_depth = 600  # Depth to which ASW is calculated. (mm)
            crit_fr_asw = 0.5  # Fraction of ASW below which irrigation is applied (0-1.0)
            irrigation_efficiency = 1  # Efficiency of the irrigation. (0-1.0)
            irrigation_allocation = off  # Allocation limits
            allocation = 0  # Allocation in ML
            default_no3_conc = 100  # Nitrate concentration (ppm N)
            default_nh4_conc = 0  # Ammonium concentration (ppm N)
            default_cl_conc = 0  # Chloride concentration (ppm Cl)
            default_no3_conc = 100  # Nitrate concentration (ppm N)
            default_nh4_conc = 0  # Ammonium concentration (ppm N)
            default_cl_conc = 0  # Chloride concentration (ppm Cl)
          manager Tree Sowing Rule
            sow_date = 01/03/1996  # Sowing date
            population = 135  # Plant Population (/ha)
            cultivar = dami
            sowing_depth = 200  # Sowing depth (mm)
            on start_of_day:
```
ppsm = [population]/10000
if today = date('[sow_date]') then
   OilPalm sow population = ppsm, depth = [sowing_depth], cultivar = [cultivar], maxcover = 1.0, budnumber = 1, row_spacing = [row_width], crop_class = plant  
endif
```
            on Init:
```
Plant_population = 0
```
          manager Calculations
            on init:
```
CumLeaves = 0
```
            on NewLeaf:
```
if today > date('01/03/2001') then
   CumLeaves = CumLeaves + 1
   ! oilpalm RemoveLowestLeaf
endif
```
        Soil
          Analysis: Thickness=[100, 200, 300, 300, 300, 300]; PH=[6.6, 6.2, 5.7, 5.5, 5.5, 5.5]
          InitialWater Initial water: FractionFull=1.00; PercentMethod=EvenlyDistributed
          Water
            Thickness  BD   AirDry  LL15  DUL   SAT
            100        1.2  0.08    0.13  0.33  0.5
            200        1.2  0.13    0.13  0.33  0.5
            300        1.2  0.1     0.1   0.31  0.44
            300        1.2  0.06    0.06  0.15  0.46
            300        1.2  0.04    0.04  0.1   0.44
            300        1.2  0.02    0.02  0.06  0.44
            SoilCrop OilPalm: LL=[0.13, 0.13, 0.27, 0.27, 0.3, 0.3]; KL=[0.1, 0.06, 0.03, 0.03, 0.03, 0.03]; XF=[1, 1, 1, 1, 1, 1]
          SoilWater: SummerCona=4.4; SummerU=9; SummerDate=1-Nov; WinterCona=4.4; WinterU=9; WinterDate=1-Apr; DiffusConst=88; DiffusSlope=35.4; Salb=0.18; CN2Bare=68; CNRed=20; CNCov=0.8; Thickness=[100, 200, 300, 300, 300, 300]; SWCON=[0.55, 0.55, 0.55, 0.55, 0.55, 0.55]
          SoilOrganicMatter: RootCN=30; RootWt=3000; SoilCN=11.5; EnrACoeff=7.4; EnrBCoeff=0.2
            Thickness  OC    FBiom  FInert
            100        1.82  0.025  0.3
            200        1.47  0.025  0.4
            300        1.2   0.015  0.75
            300        1.03  0.01   0.9
            300        0.47  0.01   0.96
            300        0.47  0.01   0.96
          Sample Initial nitrogen: NO3Units=kgha
            Thickness  NO3  NH4
            100        217  0
            200        30   0
            300        5    0
            300        5    0
            300        0    0
            300        0    0
        micromet: soilalbedo=0.23; a_interception=0.0; b_interception=0.0; c_interception=0.0; d_interception=0.0
        outputfile: filename=Expt324N3.out; title=Expt324N3
          variables
            variables: dd/mm/yyyy as Date, StemLiveWt, LeafLAI, CumLeaves, LeafGreenCohortNo, LeafAppearedCohortNo, StructureMainStemNodeNo, Age
          events Reporting Frequency: event=Daily
  folder Breure88
    simulation Breure88_056
      metfile met: filename=%apsim%\Tests\Validation\OilPalm\Cairns.met
      clock
        start_date = 01/01/1970  # Enter the start date of the simulation
        end_date = 31/12/1984  # Enter the end date of the simulation
      summaryfile
      area paddock
        OilPalm
        fertiliser
        surfaceom surface organic matter
          PoolName = wheat  # Organic Matter pool name
          type = wheat  # Organic Matter type
          mass = 2000  # Initial surface residue (kg/ha)
          cnr = 80  # C:N ratio of initial residue
          standing_fraction = 0  # Fraction of residue standing
        folder Manager folder
          operations
            1-jan  fertiliser apply amount= 200 (kg/ha), type= urea_N (), depth= 10 (mm)
          irrigation: same as Expt324.Expt324N3.paddock.Manager folder.Irrigation
          manager Tree Sowing Rule
            sow_date = 01/03/1970  # Sowing date
            population = 56  # Plant Population (/ha)
            cultivar = dami
            sowing_depth = 200  # Sowing depth (mm)
            on start_of_day:
            script: same as in Expt324.Expt324N3.paddock.Manager folder.Tree Sowing Rule
            on Init:
```
Plant_population = 0
```
        Soil: same as Expt324.Expt324N3.paddock.Soil
        micromet: soilalbedo=0.23; a_interception=0.0; b_interception=0.0; c_interception=0.0; d_interception=0.0
        outputfile: filename=Breure88_056.out; title=Breure88_056
          variables
            variables: dd/mm/yyyy as Date, StemLiveWt, LeafLAI, CoverLive
          events Reporting Frequency: event=end_year
    simulation Breure88_110 -> /simulations/Breure88/Breure88_056
      area paddock -> /simulations/Breure88/Breure88_056/paddock
        folder Manager folder -> /simulations/Breure88/Breure88_056/paddock/Manager folder
          manager Tree Sowing Rule
            sow_date = 01/03/1970  # Sowing date
            population = 110  # Plant Population (/ha)
            cultivar = dami
            sowing_depth = 200  # Sowing depth (mm)
            on start_of_day:
            script: same as in Expt324.Expt324N3.paddock.Manager folder.Tree Sowing Rule
            on Init:
```
Plant_population = 0
```
        outputfile -> /simulations/Breure88/Breure88_056/paddock/Outputfile: filename=Breure88_110.out; title=Breure88_110
          variables -> /simulations/Breure88/Breure88_056/paddock/Outputfile/Variables
          events Reporting Frequency -> /simulations/Breure88/Breure88_056/paddock/Outputfile/Reporting Frequency
    simulation Breure88_148 -> /simulations/Breure88/Breure88_056
      area paddock -> /simulations/Breure88/Breure88_056/paddock
        folder Manager folder -> /simulations/Breure88/Breure88_056/paddock/Manager folder
          manager Tree Sowing Rule
            sow_date = 01/03/1970  # Sowing date
            population = 148  # Plant Population (/ha)
            cultivar = dami
            sowing_depth = 200  # Sowing depth (mm)
            on start_of_day:
            script: same as in Expt324.Expt324N3.paddock.Manager folder.Tree Sowing Rule
            on Init:
```
Plant_population = 0
```
        outputfile -> /simulations/Breure88/Breure88_056/paddock/Outputfile: filename=Breure88_148.out; title=Breure88_148
          variables -> /simulations/Breure88/Breure88_056/paddock/Outputfile/Variables
          events Reporting Frequency -> /simulations/Breure88/Breure88_056/paddock/Outputfile/Reporting Frequency
    simulation Breure88_186 -> /simulations/Breure88/Breure88_056
      area paddock -> /simulations/Breure88/Breure88_056/paddock
        folder Manager folder -> /simulations/Breure88/Breure88_056/paddock/Manager folder
          manager Tree Sowing Rule
            sow_date = 01/03/1970  # Sowing date
            population = 186  # Plant Population (/ha)
            cultivar = dami
            sowing_depth = 200  # Sowing depth (mm)
            on start_of_day:
            script: same as in Expt324.Expt324N3.paddock.Manager folder.Tree Sowing Rule
            on Init:
```
Plant_population = 0
```
        outputfile -> /simulations/Breure88/Breure88_056/paddock/Outputfile: filename=Breure88_186.out; title=Breure88_186
          variables -> /simulations/Breure88/Breure88_056/paddock/Outputfile/Variables
          events Reporting Frequency -> /simulations/Breure88/Breure88_056/paddock/Outputfile/Reporting Frequency
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