folder simulations: version=25
  simulation ReleasedWheat
    metfile met: filename=%apsim%\Examples\MetFiles\goond.met
    clock
      start_date = 1/4/1940  # Enter the start date of the simulation
      end_date = 31/12/1940  # Enter the end date of the simulation
    summaryfile: filename=Continuous Wheat Simulation.sum
    area paddock
      soil: Site=Jimbour; Region=South East Queensland; LocalName=Waco
        SoilType = Black Vertosol  # Classification
        NearestTown = Jimbour, Q 4352
        NaturalVegetation = Grassland, mainly Qld bluegrass
        InitWater Initial water
          percentmethod: percent=1; distributed=filled from top
        Water
          Layer:
            Thickness (mm)  BD (g/cc)  AirDry (mm/mm)  LL15 (mm/mm)  DUL (mm/mm)  SAT (mm/mm)
            150             1.02       0.15            0.29          0.54         0.59
            150             1.03       0.26            0.29          0.53         0.58
            300             1.02       0.29            0.29          0.54         0.59
            300             1.02       0.29            0.29          0.54         0.58
            300             1.06       0.3             0.3           0.52         0.57
            300             1.11       0.31            0.31          0.5          0.55
            300             1.12       0.32            0.32          0.5          0.55
            300             1.15       0.33            0.33          0.48         0.53
            300             1.18       0.34            0.34          0.47         0.52
            300             1.2        0.35            0.35          0.46         0.51
            300             1.25       0.36            0.36          0.44         0.49
          SoilCrop Barley
            Layer:
              Thickness (mm)  LL (mm/mm)  KL (/day)  XF (0-1)
              150             0.29        0.1        1
              150             0.29        0.1        1
              300             0.32        0.08       1
              300             0.38        0.06       1
              300             0.39        0.04       1
              300             0.39        0.02       1
              300             0.41        0.01       1
              300             0.48        0          0
              300             0.47        0          0
              300             0.46        0          0
              300             0.44        0          0
          SoilCrop Chickpea
            Layer:
              Thickness (mm)  LL (mm/mm)  KL (/day)  XF (0-1)
              150             0.29        0.1        1
              150             0.29        0.1        1
              300             0.36        0.08       1
              300             0.43        0.06       1
              300             0.51        0.04       1
              300             0.5         0.02       1
              300             0.5         0.01       1
              300             0.48        0          0
              300             0.47        0          0
              300             0.46        0          0
              300             0.44        0          0
          SoilCrop Lucerne
            Layer:
              Thickness (mm)  LL (mm/mm)  KL (/day)  XF (0-1)
              150             0.29        0.1        1
              150             0.29        0.1        1
              300             0.29        0.1        1
              300             0.29        0.1        1
              300             0.3         0.09       1
              300             0.31        0.09       1
              300             0.32        0.09       1
              300             0.33        0.09       1
              300             0.34        0.09       1
              300             0.35        0.09       1
              300             0.36        0.09       1
          SoilCrop Maize
            Layer:
              Thickness (mm)  LL (mm/mm)  KL (/day)  XF (0-1)
              150             0.29        0.1        1
              150             0.29        0.1        1
              300             0.34        0.1        1
              300             0.34        0.08       1
              300             0.37        0.06       1
              300             0.4         0.04       1
              300             0.42        0.02       1
              300             0.48        0          0
              300             0.47        0          0
              300             0.46        0          0
              300             0.44        0          0
          SoilCrop Perennial Grass
            Layer:
              Thickness (mm)  LL (mm/mm)  KL (/day)  XF (0-1)
              150             0.29        0.1        1
              150             0.29        0.1        1
              300             0.39        0.1        1
              300             0.41        0.1        1
              300             0.4         0.09       1
              300             0.4         0.07       1
              300             0.41        0.05       1
              300             0.41        0          0
              300             0.4         0          0
              300             0.4         0          0
              300             0.42        0          0
          SoilCrop Sorghum
            Layer:
              Thickness (mm)  LL (mm/mm)  KL (/day)  XF (0-1)
              150             0.29        0.1        1
              150             0.29        0.1        1
              300             0.35        0.1        1
              300             0.38        0.08       1
              300             0.4         0.06       1
              300             0.4         0.04       1
              300             0.4         0.02       1
              300             0.48        0          0
              300             0.47        0          0
              300             0.46        0          0
              300             0.44        0          0
          SoilCrop Wheat
            Layer:
              Thickness (mm)  LL (mm/mm)  KL (/day)  XF (0-1)
              150             0.29        0.1        1
              150             0.29        0.1        1
              300             0.32        0.08       1
              300             0.32        0.06       1
              300             0.35        0.04       1
              300             0.38        0.02       1
              300             0.41        0.01       1
              300             0.48        0          0
              300             0.47        0          0
              300             0.46        0          0
              300             0.44        0          0
          SoilCrop wheat2: same as ReleasedWheat.paddock.Soil.Water.Wheat
        SoilWat: SummerCona=3.5; SummerU=6; SummerDate=1-Nov; WinterCona=3.5; WinterU=6; WinterDate=1-Apr; DiffusConst=40; DiffusSlope=16; Salb=0.13; Cn2Bare=73; CnRed=20; CnCov=0.8; CnCanopyFact=1
          Layer:
            Thickness (mm)  SWCON (0-1)
            150             0.3
            150             0.3
            300             0.3
            300             0.3
            300             0.3
            300             0.3
            300             0.3
            300             0.3
            300             0.3
            300             0.3
            300             0.3
        SoilOrganicMatter: RootCn=40; RootWt=200; SoilCn=12.5; EnrACoeff=7.4; EnrBCoeff=0.2
          Layer:
            Thickness (mm)  OC (Total %)  FBiom (0-1)  FInert (0-1)
            150             1.04          0.025        0.4
            150             0.89          0.02         0.6
            300             0.89          0.015        0.8
            300             0.89          0.01         0.9
            300             0.77          0.01         0.95
            300             0.45          0.01         0.95
            300             0.27          0.01         0.95
            300             0.22          0.01         0.95
            300             0.16          0.01         0.95
            300             0.13          0.01         0.95
            300             0.12          0.01         0.95
        Analysis
          Layer:
            Thickness (mm)  EC (1:5 dS/m)  PH (1:5 water)
            150             0.2            8.4
            150             0.25           8.8
            300             0.31           9
            300             0.4            9.2
            300             0.59           9.2
            300             0.84           9.1
            300             0.93           9
            300             1.01           9
            300             1.06           8.9
            300             1.05           8.9
            300             1.01           8.9
        Sample Initial nitrogen
          Layer:
            Thickness (mm)  NO3 (ppm)  NH4 (ppm)
            150             6.503      0.599004
            150             2.101      0.100001
            300             2.101      0.100001
            300             1.701      0.100001
            300             1.701      0.100001
            300             1.701      0.100001
            300             1.701      0.100001
            300             1.701      0.100001
            300             1.701      0.100001
            300             1.701      0.100001
            300             1.701      0.100001
      surfaceom surface organic matter
        PoolName = wheat  # Organic Matter pool name
        type = wheat  # Organic Matter type
        mass = 1000  # Initial surface residue (kg/ha)
        cnr = 80  # C:N ratio of initial residue
        standing_fraction = 0  # Fraction of residue standing
      fertiliser
      wheat
      folder Manager folder
        manager Sow on a fixed date
          category =  # Sowing criteria
          date = 1-jun  # Enter sowing date (dd-mmm)
          category =  # Sowing parameters
          crop = wheat  # Enter name of crop to sow
          density = 150  # Enter sowing density (plants/m2)
          depth = 50  # Enter sowing depth (mm)
          cultivar = hartog  # Enter cultivar
          class = plant  # Enter crop growth class
          row_spacing = 500  # Enter row spacing (mm)
          on start_of_day:
```
        if (today = date('[date]') then
              [crop] sow plants =[density], sowing_depth = [depth], cultivar = [cultivar], row_spacing = [row_spacing], crop_class = [class]
         endif
```
        manager Harvesting rule
          category =  # Harvesting criteria
          crop = wheat  # Enter name of crop to harvest when ripe
          on end_of_day:
```
           if [crop].StageName = 'harvest_ripe' or [crop].plant_status = 'dead' then
              [crop]  harvest
              [crop]  end_crop
           endif
```
      outputfile
        variables
          variables: dd/mm/yyyy as Date, stage, stagename, sw()
        events Reporting Frequency: event=daily
  simulation NewSoilNitrogen
    metfile met: filename=%apsim%\Examples\MetFiles\goond.met
    clock
      start_date = 1/4/1940  # Enter the start date of the simulation
      end_date = 31/12/1940  # Enter the end date of the simulation
    summaryfile: filename=Continuous Wheat Simulation.sum
    area paddock: same as ReleasedWheat.paddock
    PlugIns
      PlugIn=[%apsim%/UserInterface/ApsimUIPlugIn.xml, %apsim%/UserInterface/SoilTypes.xml, %apsim%/UserInterface/Graph.xml, %apsim%/UserInterface/Ausfarm.xml, %apsim%/UserInterface/DevelopersPlugIn.xml, %apsim%/Model/Accum.xml, %apsim%/Model/Bambatsi.xml, %apsim%/Model/Barley.xml, %apsim%/Model/Br.xml, %apsim%/Model/Bore.xml, %apsim%/Model/Broccoli.xml, %apsim%/Model/ButterflyPea.xml, %apsim%/Model/Canola.xml, %apsim%/Model/Canopy.xml, %apsim%/Model/Centro.xml, %apsim%/Model/Channel.xml, %apsim%/Model/Chickpea.xml, %apsim%/Model/Cl.xml, %apsim%/Model/Climatechange.xml, %apsim%/Model/Clock.xml, %apsim%/Model/Cowpea.xml, %apsim%/Model/CropUI.xml, %apsim%/Model/Dam.xml, %apsim%/Model/DCD.xml, %apsim%/Model/EGrandis.xml, %apsim%/Model/EMelliodora.xml, %apsim%/Model/Eo.xml, %apsim%/Model/EPopulnea.xml, %apsim%/Model/Erosion.xml, %apsim%/Model/Events.xml, %apsim%/Model/Fababean.xml, %apsim%/Model/Factorial.xml, %apsim%/Model/FrenchBean.xml, %apsim%/Model/Fertiliser.xml, %apsim%/Model/Fieldpea.xml, %apsim%/Model/Gcm_data.xml, %apsim%/Model/Grasp.xml, %apsim%/Model/Graz.xml, %apsim%/Model/Growth.xml, %apsim%/Model/Horsegram.xml, %apsim%/Model/Ini.xml, %apsim%/Model/InitWater.xml, %apsim%/Model/Input.xml, %apsim%/Model/Irrigation.xml, %apsim%/Model/KWTest.xml, %apsim%/Model/Lablab.xml, %apsim%/Model/Lettuce.xml, %apsim%/Model/Log.xml, %apsim%/Model/Lucerne.xml, %apsim%/Model/Lupin.xml, %apsim%/Model/Maize.xml, %apsim%/Model/Manager.xml, %apsim%/Model/Map.xml, %apsim%/Model/Memo.xml, %apsim%/Model/MetFile.xml, %apsim%/Model/MicroMet.xml, %apsim%/Model/Millet.xml, %apsim%/Model/Millet1.xml, %apsim%/Model/Millet2.xml, %apsim%/Model/Millet3.xml, %apsim%/Model/Millet4.xml, %apsim%/Model/Millet5.xml, %apsim%/Model/Mucuna.xml, %apsim%/Model/Mungbean.xml, %apsim%/Model/Navybean.xml, %apsim%/Model/Oats.xml, %apsim%/Model/Ocean_data.xml, %apsim%/Model/Operations.xml, %apsim%/Model/Orobanche.xml, %apsim%/Model/Oryza.xml, %apsim%/Model/OutputFile.xml, %apsim%/Model/Ozcot.xml, %apsim%/Model/Patchinput.xml, %apsim%/Model/Peanut.xml, %apsim%/Model/Pigeonpea.xml, %apsim%/Model/Pond.xml, %apsim%/Model/Potato.xml, %apsim%/Model/RotPlot.xml, %apsim%/Model/RugPlotUI.xml, %apsim%/Model/Root.xml, %apsim%/Model/Rule.xml, %apsim%/Model/Seedling.xml, %apsim%/Model/SiloInput.xml, %apsim%/Model/Slurp.xml, %apsim%/Model/Soi.xml, %apsim%/Model/Soil.xml, %apsim%/Model/SoilNui.xml, %apsim%/Model/SoilTemp.xml, %apsim%/Model/Solute.xml, %apsim%/Model/Sorghum.xml, %apsim%/Model/SorghumConstants.xml, %apsim%/Model/SorghumGenotype.xml, %apsim%/Model/Soybean.xml, %apsim%/Model/Stylo.xml, %apsim%/Model/Sugar.xml, %apsim%/Model/Summaryfile.xml, %apsim%/Model/Sunflower.xml, %apsim%/Model/SurfaceOM.xml, %apsim%/Model/SweetCorn.xml, %apsim%/Model/SweetSorghum.xml, %apsim%/Model/SWIM2ui.xml, %apsim%/Model/Sysbal.xml, %apsim%/Model/Tcllink.xml, %apsim%/Model/Tclmanager.xml, %apsim%/Model/Tclui.xml, %apsim%/Model/Tracker.xml, %apsim%/Model/Tree.xml, %apsim%/Model/Variables.xml, %apsim%/Model/Venlink.xml, %apsim%/Model/vine.xml, %apsim%/Model/WaterSupply.xml, %apsim%/Model/Weed.xml, %apsim%/Model/Wheat.xml, %apsim%/Model/YPCalc.xml, %apsim%\Model\Soil with new nitrogen model.xml]
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